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# 2 .
# a )
4*sqrt(5 - 2*sqrt(6))/((nthroot(2, 4) + nthroot(3, 4))*(nthroot(2, 4) + nthroot(3, 4))) = 0.202559
# б )
x := 2
y := (sqrt(x^3 + 8) + cos(|8*x - 1|))/nthroot(x^5 + 8*x + 8, 4) = 1.18451
# в )
t := (sum((i - 8)/(i + 8), i = 1 .. 5) + sum(sin(i/8), i = 1 .. 10))/product((8 + 3*i)/(8^2 + 8*i - 8), i = 1 .. 5) = 9176.05
# 3 .
x := -2, -1 .. 2
y(x) := 1/5
